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/batch
! ANSYS input file written by Workbench version 2020 R2
! File used for geometry attach: C:\Users\lenovo\OneDrive\Desktop\mech411\Project\4blade.stp
/title,dahabasi--Harmonic Response (K5)
/com,--- Data in consistent NMM units. See Solving Units in the help system for more information.
/units,MPA
/prep7
! Turn off shape checking because checks already performed inside WB mesher.
! See help system for more information.
SHPP,OFF,,NOWARN
etcon,set             ! allow ANSYS to choose best KEYOP's for 180x elements
/com,*********** Nodes for the whole assembly ***********
nblock,3,,16040
(1i9,3e20.9e3)
        1     1.542799615E+02    -3.168506723E+01     0.000000000E+00
        2     1.538227134E+02    -3.383523056E+01     7.749971259E+00
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-1
/com,*********** Elements for Body 1 "4blade-FreeParts|model2" ***********
et,1,187
eblock,19,solid,,7676
(19i9)
        1        1        1        1        0        0        0        0       10        0        1     2061     2248     2436     2317    13124    14242    13128    13127
    14238    14478
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-1
/com,*********** Send User Defined Coordinate System(s) ***********
csys,0
toffst,273.15,  ! Temperature offset from absolute zero
/com,*********** Set Reference Temperature ***********
tref,22.
/com,*********** Send Materials ***********
Temperature = 'TEMP' ! Temperature
MP,DENS,1,7.85e-09,	! tonne mm^-3
MP,ALPX,1,1.2e-05,	! C^-1
MP,C,1,434000000,	! mm^2 s^-2 C^-1
MP,KXX,1,60.5,	! tonne mm s^-3 C^-1
MP,RSVX,1,0.00017,	! ohm mm
MP,EX,1,200000,	! tonne s^-2 mm^-1
MP,NUXY,1,0.3,
MP,MURX,1,10000,

!************************* Model Summary ********************
!4blade-FreeParts|model2,	Structural Steel,	matid,	1
!************************* End Model Summary ********************
/com,*********** Fixed Supports ***********
CMBLOCK,_FIXEDSU,NODE,      138
(8i10)
       278       279       280       281       282       283       284       619
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cmsel,s,_FIXEDSU
d,all,all
nsel,all
/com,*********** Define Force Using Surface Effect Elements ***********
local,12,0,0.,0.,0.,0.,0.,0.
csys,0
et,2,154
eblock,10,,,469
(15i9)
    11741        2        2        2       12     1137     1138     1141     1141     8484     8492     1141     8485
    11742        2        2        2       12       25       55      287      287     2654     2865      287     2657
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-1
esel,s,type,,2
keyop,2,2,1                ! Apply load in local coordinate system
keyop,2,7,1                ! Use original area so load is constant in large deformation
keyop,2,11,2               ! Use real and not project area
esel,all

*DIM,_loadvari28x,TABLE,1,1,1,TIME,
! Time values
_loadvari28x(1,0,1) = 1.
! Load values
_loadvari28x(1,1,1) = 0.


*DIM,_loadvari28xi,TABLE,1,1,1,TIME,
! Time values
_loadvari28xi(1,0,1) = 1.
! Load values
_loadvari28xi(1,1,1) = 0.


*DIM,_loadvari28y,TABLE,1,1,1,TIME,
! Time values
_loadvari28y(1,0,1) = 1.
! Load values
_loadvari28y(1,1,1) = 0.


*DIM,_loadvari28yi,TABLE,1,1,1,TIME,
! Time values
_loadvari28yi(1,0,1) = 1.
! Load values
_loadvari28yi(1,1,1) = 0.


*DIM,_loadvari28z,TABLE,1,1,1,TIME,
! Time values
_loadvari28z(1,0,1) = 1.
! Load values
_loadvari28z(1,1,1) = 7.76912036677373e-003


*DIM,_loadvari28zi,TABLE,1,1,1,TIME,
! Time values
_loadvari28zi(1,0,1) = 1.
! Load values
_loadvari28zi(1,1,1) = 0.

fini
/com,*********** Performing Modal Solve ***********
/solu
antype,2
modcontrol,on
thexpand,off     ! ignore thermal strains
mxpand,,,,yes,,no     ! expand element results for stress/strains, but not write them to file.mode
outres,erase
outres,all,none
outres,nsol,all
outres,eangl,all
outres,etmp,all
outres,veng,all
outres,strs,all
outres,epel,all
outres,rsol,all
outres,cont,all
modopt,lanb,200,0.,2110.
fdele,all,all
sfdele,all,all
sfedele,all,all,all
acel,0,0,0                 ! zero out the acceleration
/com,*********** Setting and Solving Each Load Step ***********
esel,s,type,,2
nsle
sfe,all,3,pres,1,1
nsel,all
esel,all
solve
/com,**********************
/com *************** Write FE CONNECTORS *********
CEWRITE,file,ce,,INTE
fini
/com,*********** Performing MSUP Harmonic Solve ***********
/solu
antype,harm
hropt,msup
thexpand,off     ! ignore thermal strains
hrout,off
kbc,1
harfrq,0.000000,1055.000000
nsub,10
fdele,all,all
sfdele,all,all
sfedele,all,all,all
acel,0,0,0                 ! zero out the acceleration
lvscale,0,1
/com,*********** Scaling Each Load Step for MSUP Solve ***********
lvscale,%_loadvari28z%,1
! *********** WB SOLVE COMMAND ***********
! check interactive state
*get,ANSINTER_,active,,int
*if,ANSINTER_,ne,0,then
/eof
*endif
solve

fini
! ------- MSUP EXPANSION PASS -------
/solu
expass,on
hrexp,all
outres,erase
outres,all,none
outres,nsol,all
outres,eangl,all
outres,etmp,all
outres,veng,all
outres,strs,all
outres,epel,all
outres,rsol,all
outres,cont,all
numexp,all,,,yes        ! expand results at all freq. and calculate requested result items
! *********** WB SOLVE COMMAND ***********
! check interactive state
*get,ANSINTER_,active,,int
*if,ANSINTER_,ne,0,then
/eof
*endif
solve
/com *************** Write FE CONNECTORS *********
CEWRITE,file,ce,,INTE
fini
/post1
fini
