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/batch
! ANSYS input file written by Workbench version 2020 R2
! File used for geometry attach: C:\Users\lenovo\OneDrive\Desktop\mech411\Project\7blade.stp
/title,dahabasi--Modal (L5)
/com,--- Data in consistent NMM units. See Solving Units in the help system for more information.
/units,MPA
/prep7
! Turn off shape checking because checks already performed inside WB mesher.
! See help system for more information.
SHPP,OFF,,NOWARN
etcon,set             ! allow ANSYS to choose best KEYOP's for 180x elements
/com,*********** Nodes for the whole assembly ***********
nblock,3,,18942
(1i9,3e20.9e3)
        1     1.008601857E+02    -1.209688924E+02     0.000000000E+00
        2     9.916202727E+01    -1.223647921E+02     7.749971259E+00
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-1
/com,*********** Elements for Body 1 "7blade-FreeParts|model2" ***********
et,1,187
eblock,19,solid,,8896
(19i9)
        1        1        1        1        0        0        0        0       10        0        1     2255     2585     2914     2821    14066    16129    14070    14069
    16128    17161
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-1
/com,*********** Send User Defined Coordinate System(s) ***********
csys,0
toffst,273.15,  ! Temperature offset from absolute zero
/com,*********** Set Reference Temperature ***********
tref,22.
/com,*********** Send Materials ***********
Temperature = 'TEMP' ! Temperature
MP,DENS,1,7.85e-09,	! tonne mm^-3
MP,ALPX,1,1.2e-05,	! C^-1
MP,C,1,434000000,	! mm^2 s^-2 C^-1
MP,KXX,1,60.5,	! tonne mm s^-3 C^-1
MP,RSVX,1,0.00017,	! ohm mm
MP,EX,1,200000,	! tonne s^-2 mm^-1
MP,NUXY,1,0.3,
MP,MURX,1,10000,

!************************* Model Summary ********************
!7blade-FreeParts|model2,	Structural Steel,	matid,	1
!************************* End Model Summary ********************
/com,*********** Fixed Supports ***********
CMBLOCK,_FIXEDSU,NODE,      138
(8i10)
       349       350       351       352       353       354       355       715
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cmsel,s,_FIXEDSU
d,all,all
nsel,all
/com,*********** Define Rotational Velocity ***********
esel,all
cm,cm_rotvelcity29,elem
fini
/solu
antype,2                   ! modal analysis
_thickRatio=  1     ! Ratio of thick parts in the model
modopt,qrdamp,10,,,on	! calculate complex eigen solution
coriolis,yes,,,yes,no
outres,erase
outres,all,none
outres,nsol,all
outres,etmp,all
mxpand                    ! default expand in case of complex solution
dmpopt,esav,no
dmpopt,emat,no
dmpopt,full,no
cmom,cm_rotvelcity29,0.,0.,-149.749249821113,1.00154740708289e-002,4.87590095017637e-002,0.
! *********** WB SOLVE COMMAND ***********
! check interactive state
*get,ANSINTER_,active,,int
*if,ANSINTER_,ne,0,then
/eof
*endif
solve
/com *************** Write FE CONNECTORS *********
CEWRITE,file,ce,,INTE
*get,_nmodalsolproc,active,0,numcpu
fini
/post1
*dim,_direction,CHAR,6,1
_direction(1) = 'X'
_direction(2) = 'Y'
_direction(3) = 'Z'
_direction(4) = 'X'
_direction(5) = 'Y'
_direction(6) = 'Z'
*get,_lastLS,active,0,set,LSTP
*get,_beginset,active,0,set,nset,first,_lastLS
*get,_endset,active,0,set,nset,last,_lastLS
_nummodes = 0
*if,_endset,gt,0,then
_nummodes = _endset - _beginset + 1
*endif
_nummodes=_nummodes/2
*do,i_mode,1,_nummodes
   *do,j_component,1,6
		*if,j_component,gt,3,then
			*get,PFACT_%i_mode%_%j_component%,MODE,%i_mode%,PFACT,IMAG,DIREC,_direction(%j_component%)
		*else
			*get,PFACT_%i_mode%_%j_component%,MODE,%i_mode%,PFACT,,DIREC,_direction(%j_component%)
		*endif
   *enddo
*enddo
*dim,_tmdirection,CHAR,6,1
_tmdirection(1) = 'X'
_tmdirection(2) = 'Y'
_tmdirection(3) = 'Z'
_tmdirection(4) = 'X'
_tmdirection(5) = 'Y'
_tmdirection(6) = 'Z'
*do,j_component,1,6
    *if,j_component,gt,3,then
        *get,TOTALMASS_%j_component%,ELEM,0,IOR,_tmdirection(%j_component%)
    *else
        *get,TOTALMASS_%j_component%,ELEM,0,MTOT,_tmdirection(%j_component%)
    *endif
*enddo
fini
